// COMSOL Multiphysics 5.6.0.280 model "Pressure_Sensor_Serpentine_Sweep.mph"
// 压阻式压力传感器，壳
// modeldescr_mems/piezoresistive_pressure_sensor_shell
// 本例模拟一种压阻式压力传感器。显示如何计算由四端口压敏电阻中嵌入的膜受外加压力作用产生变形时由应力产生的电势差。使用了“压阻，壳”接口。此模型基于早期的 MEMS 压力传感器分析：Motorola MAP 传感器（S. D. Senturia, Microsystem Design, Springer, 2000）。
// 此模型需要“MEMS 模块”和“结构力学模块”。
// Outline of the model tree

Parameters
  p1 = 200[kPa]  // Applied pressure

Selections
  sel1: Explicit "Piezoresistor" on boundaries 9
  sel2: Explicit "Connections" on boundaries 3, 5, 6, 8, 15-17, 20
  box1: Box "Membrane" | entitydim = 2; xmin = -501; xmax = 501; ymin = -30; ymax = 1000; condition = inside
  uni1: Union "Model boundaries" | entitydim = 2; input = {sel2, box1}
  uni2: Union "Electric currents" | entitydim = 2; input = {sel2, sel1}
  adj1: Adjacent "Fixed Edges" | entitydim = 2; input = {box1}; outputdim = 1
  dif1: Difference "Fixed Boundaries" | entitydim = 2; add = {uni1}; subtract = {box1}

Coordinate systems
  sys2: Rotated "Rotated System 2" | angle = {-45[deg], 0, 0}

Geometry
  geom1 "Geometry 1" (3D, length unit µm)
    wp1: WorkPlane | unite = on
      sq1: Square
        pos = {0, 478}
        base = center
        layername = Layer 1
        layer = 100
        layerleft = on
        layerright = on
        layertop = on
        size = 1200
      sq2: Square | base = center; size = 22.6
      r1: Rectangle
        rot = 45
        base = center
        layername = Layer 1
        layer = 6.25
        layerleft = on
        layerright = on
        size = {52.5, 10}
      r2: Rectangle
        rot = -45
        base = center
        layername = Layer 1
        layer = 11.25
        layerleft = on
        layerright = on
        size = {62.5, 20}
      r3: Rectangle | pos = {0, -15}; base = center; size = {210, 140}
      r4: Rectangle | pos = {-105, -35}; size = {40, 50}
      r5: Rectangle | pos = {-105, 15}; size = {90, 40}
      r6: Rectangle | pos = {-105, -85}; size = {90, 40}
      r7: Rectangle | pos = {-55, -45}; size = {40, 30}
      mir1: Mirror | input = r4, r5, r6, r7; keep = on; axis = {1, 0}
      sgcut1: Rectangle "矩形 1" | pos = {-8.48528137424, 11.313708499}; rot = -45; base = center; size = {2.5, 16}
      sgcut2: Rectangle "矩形 2" | pos = {-1.41421356237, -1.41421356237}; rot = -45; base = center; size = {2.5, 16}
      sgcut3: Rectangle "矩形 3" | pos = {11.313708499, -8.48528137424}; rot = -45; base = center; size = {2.5, 16}
      sgdif1: Difference "求差 1" | input = r2; input2 = sgcut1, sgcut2, sgcut3
    fin: Finalize "Form Union"
    cmf1: CompositeFaces "Form Composite Faces 1" | input = fin(1) boundaries 19, 20, 27-39, 41, 44, 45, 48
    cmf2: CompositeFaces "Form Composite Faces 2" | input = cmf1(1) boundaries 11, 14-18, 27, 29, 34-37
    ige1: IgnoreEdges | input = cmf2(1) edges 24, 110
    cmf3: CompositeFaces "Form Composite Faces 3" | input = ige1(1) boundaries 7, 12, 15, 18, 23, 26-28
    ige2: IgnoreEdges | input = cmf3(1) edges 4, 6, 8, 12, 100, 103-105
    sel1: ExplicitSelection "Piezoresistor" | selection = ige2(1) boundaries 9
    sel2: ExplicitSelection "Connections" | selection = ige2(1) boundaries 3, 5, 6, 8, 15-17, 20
    boxsel1: BoxSelection "Membrane" | entitydim = 2; xmin = -501; xmax = 501; ymin = -30; ymax = 1000; condition = inside
    unisel1: UnionSelection "Model Boundaries" | entitydim = 2; input = {sel2, boxsel1}
    unisel2: UnionSelection "Electric currents" | entitydim = 2; input = {sel1, sel2}
    adjsel1: AdjacentSelection "Fixed Edges" | entitydim = 2; input = {boxsel1}; outputdim = 1
    difsel1: DifferenceSelection "Fixed Boundaries" | entitydim = 2; add = {unisel1}; subtract = {boxsel1}

Materials
  mat1: Common "n-Silicon (single-crystal, lightly doped)" on all boundaries
    // C. S. Smith, “Piezoresistance Effect in Silicon and Germanium”, Physical Review, vol. 94, no. 1, pp. 42-49, 1957.
    // C. Jacoboni, C. Canali, G. Ottaviani and A. Alberigi Quaranta, “A Review of some Charge Transport Properties of Silicon”, Solid-State Electronics, vol. 20, pp. 77-89, 1977.
    def "Basic"
      density = 2330[kg/m^3]
      relpermittivity = 4.5
      electricconductivity = sigma0(nd[m^3])
      an1: Analytic | funcname = sigma0; expr = (N*e_const*0.1400/sqrt(1+N/(N/350 +3e22))); args = N
    Anisotropic
      D = {166[GPa], 64[GPa], 64[GPa], 0[GPa], 0[GPa], 0[GPa], 64[GPa], 166[GPa], 64[GPa], 0[GPa], 0[GPa], 0[GPa], 64[GPa], 64[GPa], 166[GPa], 0[GPa], 0[GPa], 0[GPa], 0[GPa], 0[GPa], 0[GPa], 80[GPa], 0[GPa], 0[GPa], 0[GPa], 0[GPa], 0[GPa], 0[GPa], 80[GPa], 0[GPa], 0[GPa], 0[GPa], 0[GPa], 0[GPa], 0[GPa], 80[GPa]}
      eta_D = {0, 0, 0, 0, 0, 0, 0, 0, 0, 0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}
    AnisotropicVoGrp "Anisotropic, Voigt notation"
      DVo = {166[GPa], 64[GPa], 64[GPa], 0[GPa], 0[GPa], 0[GPa], 64[GPa], 166[GPa], 64[GPa], 0[GPa], 0[GPa], 0[GPa], 64[GPa], 64[GPa], 166[GPa], 0[GPa], 0[GPa], 0[GPa], 0[GPa], 0[GPa], 0[GPa], 80[GPa], 0[GPa], 0[GPa], 0[GPa], 0[GPa], 0[GPa], 0[GPa], 80[GPa], 0[GPa], 0[GPa], 0[GPa], 0[GPa], 0[GPa], 0[GPa], 80[GPa]}
      eta_DVo = {0, 0, 0, 0, 0, 0, 0, 0, 0, 0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}
    PiezoresistanceForm
      Pil = {-102.2e-11[1/Pa]/sigma0(nd[m^3])[S/m], 53.4e-11[1/Pa]/sigma0(nd[m^3])[S/m], 53.4e-11[1/Pa]/sigma0(nd[m^3])[S/m], 0, 0, 0, 53.4e-11[1/Pa]/sigma0(nd[m^3])[S/m], -102.2e-11[1/Pa]/sigma0(nd[m^3])[S/m], 53.4e-11[1/Pa]/sigma0(nd[m^3])[S/m], 0, 0, 0, 53.4e-11[1/Pa]/sigma0(nd[m^3])[S/m], 53.4e-11[1/Pa]/sigma0(nd[m^3])[S/m], -102.2e-11[1/Pa]/sigma0(nd[m^3])[S/m], 0, 0, 0, 0, 0, 0, -13.6e-11[1/Pa]/sigma0(nd[m^3])[S/m], 0, 0, 0, 0, 0, 0, -13.6e-11[1/Pa]/sigma0(nd[m^3])[S/m], 0, 0, 0, 0, 0, 0, -13.6e-11[1/Pa]/sigma0(nd[m^3])[S/m]}
      an1: Analytic | funcname = sigma0; expr = (N*e_const*0.1400/sqrt(1+N/(N/350 +3e22))); args = N
    ElastoresistanceForm
      ml = {-101.4/sigma0(nd[m^3])[S/m], 57.6/sigma0(nd[m^3])[S/m], 57.6/sigma0(nd[m^3])[S/m], 0, 0, 0, 57.6/sigma0(nd[m^3])[S/m], -101.4/sigma0(nd[m^3])[S/m], 57.6/sigma0(nd[m^3])[S/m], 0, 0, 0, 57.6/sigma0(nd[m^3])[S/m], 57.6/sigma0(nd[m^3])[S/m], -101.4/sigma0(nd[m^3])[S/m], 0, 0, 0, 0, 0, 0, -10.8/sigma0(nd[m^3])[S/m], 0, 0, 0, 0, 0, 0, -10.8/sigma0(nd[m^3])[S/m], 0, 0, 0, 0, 0, 0, -10.8/sigma0(nd[m^3])[S/m]}
      an1: Analytic | funcname = sigma0; expr = (N*e_const*0.1400/sqrt(1+N/(N/350 +3e22))); args = N
  mat2: Common "p-Silicon (single-crystal, lightly doped)" on selection uni2
    // C. S. Smith, “Piezoresistance Effect in Silicon and Germanium”, Physical Review, vol. 94, no. 1, pp. 42-49, 1957.
    // C. Jacoboni, C. Canali, G. Ottaviani and A. Alberigi Quaranta, “A Review of some Charge Transport Properties of Silicon”, Solid-State Electronics, vol. 20, pp. 77-89, 1977.
    def "Basic"
      density = 2330[kg/m^3]
      relpermittivity = 4.5
      electricconductivity = sigma0(nd[m^3])
      an1: Analytic | funcname = sigma0; expr = (N*e_const*0.048/sqrt(1+N/(N/81 +4e22))); args = N
    Anisotropic
      D = {166[GPa], 64[GPa], 64[GPa], 0[GPa], 0[GPa], 0[GPa], 64[GPa], 166[GPa], 64[GPa], 0[GPa], 0[GPa], 0[GPa], 64[GPa], 64[GPa], 166[GPa], 0[GPa], 0[GPa], 0[GPa], 0[GPa], 0[GPa], 0[GPa], 80[GPa], 0[GPa], 0[GPa], 0[GPa], 0[GPa], 0[GPa], 0[GPa], 80[GPa], 0[GPa], 0[GPa], 0[GPa], 0[GPa], 0[GPa], 0[GPa], 80[GPa]}
      eta_D = {0, 0, 0, 0, 0, 0, 0, 0, 0, 0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}
    AnisotropicVoGrp "Anisotropic, Voigt notation"
      DVo = {166[GPa], 64[GPa], 64[GPa], 0[GPa], 0[GPa], 0[GPa], 64[GPa], 166[GPa], 64[GPa], 0[GPa], 0[GPa], 0[GPa], 64[GPa], 64[GPa], 166[GPa], 0[GPa], 0[GPa], 0[GPa], 0[GPa], 0[GPa], 0[GPa], 80[GPa], 0[GPa], 0[GPa], 0[GPa], 0[GPa], 0[GPa], 0[GPa], 80[GPa], 0[GPa], 0[GPa], 0[GPa], 0[GPa], 0[GPa], 0[GPa], 80[GPa]}
      eta_DVo = {0, 0, 0, 0, 0, 0, 0, 0, 0, 0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}
    PiezoresistanceForm
      Pil = {6.6e-11[1/Pa]/sigma0(nd[m^3])[S/m], -1.1e-11[1/Pa]/sigma0(nd[m^3])[S/m], -1.1e-11[1/Pa]/sigma0(nd[m^3])[S/m], 0, 0, 0, -1.1e-11[1/Pa]/sigma0(nd[m^3])[S/m], 6.6e-11[1/Pa]/sigma0(nd[m^3])[S/m], -1.1e-11[1/Pa]/sigma0(nd[m^3])[S/m], 0, 0, 0, -1.1e-11[1/Pa]/sigma0(nd[m^3])[S/m], -1.1e-11[1/Pa]/sigma0(nd[m^3])[S/m], 6.6e-11[1/Pa]/sigma0(nd[m^3])[S/m], 0, 0, 0, 0, 0, 0, 138.1e-11[1/Pa]/sigma0(nd[m^3])[S/m], 0, 0, 0, 0, 0, 0, 138.1e-11[1/Pa]/sigma0(nd[m^3])[S/m], 0, 0, 0, 0, 0, 0, 138.1e-11[1/Pa]/sigma0(nd[m^3])[S/m]}
      an1: Analytic | funcname = sigma0; expr = (N*e_const*0.048/sqrt(1+N/(N/81 +4e22))); args = N
    ElastoresistanceForm
      ml = {9.6/sigma0(nd[m^3])[S/m], 1.8/sigma0(nd[m^3])[S/m], 1.8/sigma0(nd[m^3])[S/m], 0, 0, 0, 1.8/sigma0(nd[m^3])[S/m], 9.6/sigma0(nd[m^3])[S/m], 1.8/sigma0(nd[m^3])[S/m], 0, 0, 0, 1.8/sigma0(nd[m^3])[S/m], 1.8/sigma0(nd[m^3])[S/m], 9.6/sigma0(nd[m^3])[S/m], 0, 0, 0, 0, 0, 0, 110.0/sigma0(nd[m^3])[S/m], 0, 0, 0, 0, 0, 0, 110.0/sigma0(nd[m^3])[S/m], 0, 0, 0, 0, 0, 0, 110.0/sigma0(nd[m^3])[S/m]}
      an1: Analytic | funcname = sigma0; expr = (N*e_const*0.048/sqrt(1+N/(N/81 +4e22))); args = N

Physics
  shell: Shell on selection uni1
    dependent variable u = {u, v, w}
    emm1: Elastic "Linear Elastic Material 1" (default) | SolidModel = Anisotropic; AnisotropicOption = AnisotropicVo
      shls1: ShellLocalSystem (default) | coordinateSystem = sys2
    to1: ThicknessOffset "Thickness and Offset 1" (default) | d = 20[um]
    free1: Free (default)
    init1: init "Initial Values 1" (default)
    fix1: Fixed "Fixed Constraint 1" on selection adj1
    fix2: Fixed "Fixed Constraint 2" on selection dif1
    fl1: FaceLoad on selection box1 | LoadTypeForce = FollowerLoad; FollowerPressure = p1
  ecs: ConductiveMediaShell "Electric Currents, Single Layer Shell" on selection uni2
    dependent variable V
    ds.ds = 0.4[um]
    cucn1: CurrentConservation (default) | minput_numberdensity = 1.45e20[1/cm^3]; coordinateSystem = sys2
    ein1: ElectricInsulation (default)
    init1: init "Initial Values 1" (default)
    pzrm1: PiezoresistiveMaterial on selection sel1 | coordinateSystem = sys2; minput_numberdensity = 1.32e19[1/cm^3]
    gnd1: Ground on edges 86
    term1: Terminal on edges 11, 13 | TerminalType = Voltage; V0 = 3
    term2: Terminal on edges 7
    term3: Terminal on edges 88, 89

Multiphysics
  pzrs1: PiezoresistiveEffectShell on all boundaries | Solid_physics = shell; ElectricCurrents_physics = ecs

Mesh
  mesh1 "Mesh 1"
    size: MeshSizeDefault | hmax = 60; hmin = 0.5; custom = on
    size1: Size on selection sel1 | hmax = 2; custom = on; hmin = 0.1
    size2: Size on selection sel2 | hmax = 6; custom = on; hmin = 0.1
    size3: Size on edges 27, 29, 41, 43-52, 63-68, 74 | hmax = 0.4; custom = on; hmin = 0.1
    ftri1: FreeTri "Free Triangular 1" on boundaries 2, 3, 5-9, 12, 13, 15-18, 20

Studies
  std1 "Study 1"
    param: Parametric "参数化扫描" | pname = p1; plistarr = 0 25 50 75 100 125 150 175 200; punit = kPa
    stat: Stationary

Solver configurations
  sol1 "Solution 1" (study std1)
    v1: Variables "因变量 1"
    s1: Stationary "稳态求解器 1"
      dDef: Direct "直接"
      fc1: FullyCoupled "全耦合 1" | linsolver = dDef

Datasets
  dset1: Solution | solution = sol1
  shl1: Shell | data = dset1; orientationexpr = {shell.nlX, shell.nlY, shell.nlZ}; distanceexpr = shell.z_pos
  dset2: Solution on selection box1 | solution = sol1
  dset3: Solution on selection uni2 | solution = sol1

Derived values
  gev1: EvalGlobal "Global Evaluation 1"
    data = dset1
    table = tbl1
    expr = {ecs.I0_1, ecs.V0_2-ecs.V0_3}
    unit = {mA, mV}
    descr = {Terminal current, Device Output}
  gev_pressure_sweep: EvalGlobal "全局计算" | data = dset1; expr = {p1, ecs.I0_1, ecs.V0_2-ecs.V0_3}; unit = {kPa, A, V}
  evs150: EvalGlobal "全局计算 150" | data = dset1; expr = {ecs.I0_1, ecs.V0_2-ecs.V0_3}
  evs175: EvalGlobal "全局计算 175" | data = dset1; expr = {ecs.I0_1, ecs.V0_2-ecs.V0_3}
  evs200: EvalGlobal "全局计算 200" | data = dset1; expr = {ecs.I0_1, ecs.V0_2-ecs.V0_3}

Tables
  mm1: Table "Maximum and Minimum Values"
    // Max/min surface
    X | Y | Z | Second Piola-Kirchhoff stress, local coordinate system, 12 component (N/m^2)
    -29.4118 | 978 | 0 | -3.84189e+07
    500 | 507.412 | 0 | 3.84068e+07
  tbl1: Table
    // Global Evaluation 1
    Terminal current (mA) | Device Output (mV)
    5.92093 | -53.9275

Plots
  pg1: PlotGroup3D "Stress (shell)" | data = shl1
    surf1: Surface | expr = gpeval(4,shell.mises); descr = von Mises stress
      def: Deform "Deformation" | expr = {u, v, w}; descr = Displacement field
  pg2: PlotGroup3D "Shell Geometry (shell)" | data = shl1
    surf1: Surface "Top and Bottom" | expr = shell.z
  pg3: PlotGroup3D "Thickness and Orientation (shell)" | data = dset1
    con1: Contour "Thickness" | expr = shell.d; contourtype = filled
    syss: CoordSysSurface "Shell Local System" | sys = shellsys
  pg4: PlotGroup3D "Face Loads (shell)" | data = dset1
    arws1: ArrowSurface "Face Load 1" | expr = {shell.fl1.F_Ax, shell.fl1.F_Ay, shell.fl1.F_Az}
      col: Color "Color Expression" | expr = shell.fl1.F_A_Mag
      def: Deform "Deformation" | expr = {u, v, w}; descr = Displacement field
    surf1: Surface "Gray Surfaces" | expr = 1
      def: Deform "Deformation" | expr = {u, v, w}; descr = Displacement field
      sel1: Selection on boundaries 2, 3, 5-9, 12, 13, 15-18, 20
      tran1: Transparency | transparency = 0.8
  pg5: PlotGroup3D "Electric Potential (ecs)" | data = dset1
    surf1: Surface | expr = V
  pg6: PlotGroup3D "Displacement" | data = dset2
    surf1: Surface | expr = shell.disp; descr = Displacement magnitude
      def1: Deform "Deformation 1" | expr = {u, v, w}
  pg7: PlotGroup3D "In-Plane Shear Stress (Local Coordinates)" | data = dset2
    surf1: Surface | expr = shell.Sl12; descr = Second Piola-Kirchhoff stress, local coordinate system, 12 component
    mms1: MaxMinSurface
      expr = shell.Sl12
      descr = Second Piola-Kirchhoff stress, local coordinate system, 12 component
      table = mm1
  pg8: PlotGroup1D "In-Plane Shear Stress (Local Coordinate System)" | data = dset1
    lngr1: LineGraph on edges 6, 92
      expr = shell.Sl12
      descr = Second Piola-Kirchhoff stress, local coordinate system, 12 component
  pg9: PlotGroup3D "Current and Voltage" | data = dset3
    con1: Contour | expr = V
    arws1: ArrowSurface
      expr = {ecs.tJx, ecs.tJy, ecs.tJz}
      descr = Tangential current density (spatial frame)
      arrowcount = 3000